<?xml version="1.0"?>

<!--

    <property value="4">systems/JATO/JATO_rokets_number</property>
    <property value="1000">systems/JATO/JATO_rokets_thrust</property>
    <property value="158.5">systems/JATO/JATO_rokets_weitght</property>
    <property value="200">systems/JATO/JATO_rokets_isp</property>

    -->

<rocket_engine name="JATO_M8_Engine">
    <isp>228</isp>
    <builduptime> 0.2 </builduptime>
    <variation>
        <thrust>0.02</thrust>
        <total_isp>0.00</total_isp>
    </variation>
    <thrust_table name="propulsion/thrust_prop_remain" type="internal">
        <tableData>
            0.0 200
            6.0 800
            8.0 1000
            40.0 1000
            50.0 800
            60.0 500
            70.0 0.0
        </tableData>
    </thrust_table>
</rocket_engine>
